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/com,--- Data in consistent NMM units. See Solving Units in the help system for more information.
/units,MPA
/prep7
! Turn off shape checking because checks already performed inside WB mesher.
! See help system for more information.
SHPP,OFF,,NOWARN
etcon,set             ! allow ANSYS to choose best KEYOP's for 180x elements
/com,*********** Nodes for the whole assembly ***********
nblock,3,,650
(1i9,3e20.9e3)
        1    2.217276676E+000    2.675855009E+001    5.000000000E+000
        2    4.419407105E+000    2.648405482E+001    5.000000000E+000
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-1
/com,*********** Elements for Body 1 "Solid" ***********
et,1,186
keyo,1,2,1          ! set full integration on SOLID186
eblock,19,solid,,76
(19i9)
        1        1        1        1        0        0        0        0       20        0        1        1      137      136       97       36      138      134      133
      185      527      468      184      325      525      523      324      182      528      524      467
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-1
/com,*********** Send User Defined Coordinate System(s) ***********
local,12,1,0.,0.,0.,-0.,0.,0.
CYL1 = 12      ! Set Coordinate System ID to User Specified Name
csys,0
toffst,273.15,  ! Temperature offset from absolute zero
/com,*********** Set Reference Temperature ***********
tref,22.
/com,*********** Send Materials ***********
MP,DENS,1,7.85e-09,	! tonne mm^-3
MP,ALPX,1,1.2e-05,	! C^-1
MP,C,1,434000000,	! mm^2 s^-2 C^-1
MP,KXX,1,60.5,	! tonne mm s^-3 C^-1
MP,RSVX,1,0.00017,	! ohm mm
MP,EX,1,200000,	! tonne s^-2 mm^-1
MP,NUXY,1,0.3,
MP,MURX,1,10000,

!************************* Model Summary ********************
!Solid,	Structural Steel,	matid,	1
!************************* End Model Summary ********************
/com,*********** Send Named Selection as Node Component ***********
CMBLOCK,LEFT    ,NODE,       21
(8i10)
        75        76        95       134       136       137       138       139
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/com,*********** Send Named Selection as Node Component ***********
CMBLOCK,RIGHT   ,NODE,       21
(8i10)
        55        56        77       116       135       160       178       179
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/com,*********** Send Named Selection as Node Component ***********
CMBLOCK,DIRICHLET,NODE,      157
(8i10)
        56        57        58        59        60        61        62        63
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/com,*********** Fixed Supports ***********
CMBLOCK,_FIXEDSU,NODE,      157
(8i10)
        56        57        58        59        60        61        62        63
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cmsel,s,_FIXEDSU
d,all,all
nsel,all
/com,*********** Node Rotations ***********
nmod,76,,,,90.,0.,0.
nmod,95,,,,90.,0.,0.
nmod,134,,,,90.,0.,0.
nmod,136,,,,90.,0.,0.
nmod,137,,,,90.,0.,0.
nmod,138,,,,90.,0.,0.
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nmod,530,,,,90.,0.,0.
/com,*********** Create Periodic/Cyclic Symmetry ***********
CYCOPT,USRROT,1
CYCOPT,STATUS
*DIM,_CYCLICMAP,ARRAY,2,21
*SET,_CYCLICMAP(1,1),55,76
*SET,_CYCLICMAP(1,2),56,75
*SET,_CYCLICMAP(1,3),77,95
*SET,_CYCLICMAP(1,4),116,134
*SET,_CYCLICMAP(1,5),135,136
*SET,_CYCLICMAP(1,6),160,139
*SET,_CYCLICMAP(1,7),178,140
*SET,_CYCLICMAP(1,8),179,137
*SET,_CYCLICMAP(1,9),180,138
*SET,_CYCLICMAP(1,10),382,423
*SET,_CYCLICMAP(1,11),383,425
*SET,_CYCLICMAP(1,12),384,426
*SET,_CYCLICMAP(1,13),386,424
*SET,_CYCLICMAP(1,14),428,464
*SET,_CYCLICMAP(1,15),505,524
*SET,_CYCLICMAP(1,16),506,525
*SET,_CYCLICMAP(1,17),526,527
*SET,_CYCLICMAP(1,18),572,531
*SET,_CYCLICMAP(1,19),573,530
*SET,_CYCLICMAP(1,20),590,529
*SET,_CYCLICMAP(1,21),591,528
CYCLIC,4,,12,,,_CYCLICMAP
fini
